// SBML level 3 version 1

model JbCkJzt6ZQeg()
  // new_map
  // Last Modified Thu Jan 19 2017 15:07:55 GMT+0100 (CET)
  // Escher
  // model units - substance: substance, time: time, extent: substance

  // Compartments:
  compartment c = 1 volume; c is "Cytosol";

  // Species:
  substanceOnly species $h2o_c in c = 1; h2o_c is "H2O";
  substanceOnly species oaa_c in c = 1; oaa_c is "Oxaloacetate";
  substanceOnly species cit_c in c = 1; cit_c is "Citrate";
  substanceOnly species $coa_c in c = 1; coa_c is "Coenzyme A";
  substanceOnly species $h_c in c = 1; h_c is "H+";
  substanceOnly species accoa_c in c = 1; accoa_c is "Acetyl-CoA";
  substanceOnly species icit_c in c = 1; icit_c is "Isocitrate";
  substanceOnly species akg_c in c = 1; akg_c is "2-Oxoglutarate";
  substanceOnly species $co2_c in c = 1; co2_c is "CO2";
  substanceOnly species nadp_c in c = 1; nadp_c is "Nicotinamide adenine dinucleotide phosphate";
  substanceOnly species $nadph_c in c = 1; nadph_c is "Nicotinamide adenine dinucleotide phosphate - reduced";
  substanceOnly species sdhlam_c in c = 1; sdhlam_c is "S Succinyldihydrolipoamide C12H20NO4S2";
  substanceOnly species lpam_c in c = 1; lpam_c is "Lipoamide C8H15NOS2";
  substanceOnly species succoa_c in c = 1; succoa_c is "Succinyl-CoA";
  substanceOnly species dhlam_c in c = 1; dhlam_c is "Dihydrolipoamide C8H17NOS2";
  substanceOnly species $atp_c in c = 1; atp_c is "ATP";
  substanceOnly species succ_c in c = 1; succ_c is "Succinate";
  substanceOnly species $adp_c in c = 1; adp_c is "ADP";
  substanceOnly species $pi_c in c = 1; pi_c is "Phosphate";
  substanceOnly species $fadh2_c in c = 1; fadh2_c is "Flavin adenine dinucleotide reduced";
  substanceOnly species fum_c in c = 1; fum_c is "Fumarate";
  substanceOnly species $fad_c in c = 1; fad_c is "Flavin adenine dinucleotide oxidized";
  substanceOnly species mal__L_c in c = 1; mal__L_c is "L-Malate";
  substanceOnly species $nadh_c in c = 1; nadh_c is "Nicotinamide adenine dinucleotide - reduced";
  substanceOnly species $nad_c in c = 1; nad_c is "Nicotinamide adenine dinucleotide";
  substanceOnly species mqn8_c in c = 1; mqn8_c is "Menaquinone 8";
  substanceOnly species mql8_c in c = 1; mql8_c is "Menaquinol 8";
  substanceOnly species pep_c in c = 1; pep_c is "Phosphoenolpyruvate";
  substanceOnly species hco3_c in c = 1; hco3_c is "Bicarbonate";
  substanceOnly species pyr_c in c = 1; pyr_c is "Pyruvate";
  substanceOnly species $o2_c in c = 1; o2_c is "O2";
  substanceOnly species h2o2_c in c = 1; h2o2_c is "Hydrogen peroxide";
  substanceOnly species actp_c in c = 1; actp_c is "Acetyl phosphate";
  substanceOnly species ac_c in c = 1; ac_c is "Acetate";
  substanceOnly species $ppi_c in c = 1; ppi_c is "Diphosphate";
  substanceOnly species $amp_c in c = 1; amp_c is "AMP";
  substanceOnly species $for_c in c = 1; for_c is "Formate";
  substanceOnly species acald_c in c = 1; acald_c is "Acetaldehyde";
  substanceOnly species lac__D_c in c = 1; lac__D_c is "D-Lactate";
  substanceOnly species glu__L_c in c = 1; glu__L_c is "L-Glutamate";
  substanceOnly species _2kmb_c in c = 1; _2kmb_c is "2-keto-4-methylthiobutyrate";
  substanceOnly species met__L_c in c = 1; met__L_c is "L-Methionine";
  substanceOnly species acorn_c in c = 1; acorn_c is "N2-Acetyl-L-ornithine";
  substanceOnly species acg5sa_c in c = 1; acg5sa_c is "N-Acetyl-L-glutamate 5-semialdehyde";
  substanceOnly species hcys__L_c in c = 1; hcys__L_c is "L-Homocysteine";
  substanceOnly species amet_c in c = 1; amet_c is "S-Adenosyl-L-methionine";
  substanceOnly species ahcys_c in c = 1; ahcys_c is "S-Adenosyl-L-homocysteine";
  substanceOnly species _8aonn_c in c = 1; _8aonn_c is "8-Amino-7-oxononanoate";
  substanceOnly species amob_c in c = 1; amob_c is "S-Adenosyl-4-methylthio-2-oxobutanoate";
  substanceOnly species dann_c in c = 1; dann_c is "7,8-Diaminononanoate";
  substanceOnly species dscl_c in c = 1; dscl_c is "Dihydrosirohydrochlorin";
  substanceOnly species uppg3_c in c = 1; uppg3_c is "Uroporphyrinogen III";
  substanceOnly species asp__L_c in c = 1; asp__L_c is "L-Aspartate";
  substanceOnly species asn__L_c in c = 1; asn__L_c is "L-Asparagine";
  substanceOnly species gln__L_c in c = 1; gln__L_c is "L-Glutamine";
  substanceOnly species chor_c in c = 1; chor_c is "Chorismate";
  substanceOnly species _4adcho_c in c = 1; _4adcho_c is "4-amino-4-deoxychorismate";
  substanceOnly species adcobdam_c in c = 1; adcobdam_c is "Adenosyl cobyrinate diamide";
  substanceOnly species adcobhex_c in c = 1; adcobhex_c is "Adenosyl-cobyric acid";
  substanceOnly species _1pyr5c_c in c = 1; _1pyr5c_c is "1-Pyrroline-5-carboxylate";
  substanceOnly species cys__L_c in c = 1; cys__L_c is "L-Cysteine";
  substanceOnly species acser_c in c = 1; acser_c is "O-Acetyl-L-serine";
  substanceOnly species h2s_c in c = 1; h2s_c is "Hydrogen sulfide";
  substanceOnly species cpppg3_c in c = 1; cpppg3_c is "Coproporphyrinogen III";
  substanceOnly species hmbil_c in c = 1; hmbil_c is "Hydroxymethylbilane";
  substanceOnly species pro__L_c in c = 1; pro__L_c is "L-Proline";
  substanceOnly species _3mob_c in c = 1; _3mob_c is "3-Methyl-2-oxobutanoate";
  substanceOnly species _3c3hmp_c in c = 1; _3c3hmp_c is "3-Carboxy-3-hydroxy-4-methylpentanoate";
  substanceOnly species malcoa_c in c = 1; malcoa_c is "Malonyl-CoA";

  // Reactions:
  CS: accoa_c + oaa_c => cit_c + $h_c + $coa_c; kf_CS*accoa_c^CS_reactant_1*oaa_c^CS_reactant_3; CS is "Citrate synthase";
    kf_CS = 1 per_mole_pow_2_per_second;
  ACONT: cit_c -> icit_c; kf_ACONT*cit_c^ACONT_reactant_1 - kr_ACONT*icit_c^ACONT_product_1; ACONT is "Aconitase";
    kf_ACONT = 1 per_second; kr_ACONT = 1 per_second;
  ICDHyr: icit_c + nadp_c -> $nadph_c + akg_c + $co2_c; kf_ICDHyr*icit_c^ICDHyr_reactant_1*nadp_c^ICDHyr_reactant_2 - kr_ICDHyr*nadph_c^ICDHyr_product_1*akg_c^ICDHyr_product_2*co2_c^ICDHyr_product_3; ICDHyr is "Isocitrate dehydrogenase (NADP)";
    kf_ICDHyr = 1 per_mole_per_second; kr_ICDHyr = 1 per_mole_pow_2_per_second;
  AKGDa: lpam_c + akg_c + $h_c => sdhlam_c + $co2_c; kf_AKGDa*lpam_c^AKGDa_reactant_1*akg_c^AKGDa_reactant_2*h_c^AKGDa_reactant_3; AKGDa is "Oxoglutarate dehydrogenase (lipoamide)";
    kf_AKGDa = 1 per_mole_pow_2_per_second;
  AKGDb: sdhlam_c + $coa_c => dhlam_c + succoa_c; kf_AKGDb*sdhlam_c^AKGDb_reactant_1*coa_c^AKGDb_reactant_2; AKGDb is "Oxoglutarate dehydrogenase (dihydrolipoamide S-succinyltransferase)";
    kf_AKGDb = 1 per_mole_per_second;
  SUCOAS: succ_c + $atp_c + $coa_c -> $adp_c + $pi_c + succoa_c; kf_SUCOAS*succ_c^SUCOAS_reactant_1*atp_c^SUCOAS_reactant_2*coa_c^SUCOAS_reactant_3 - kr_SUCOAS*adp_c^SUCOAS_product_1*pi_c^SUCOAS_product_2*succoa_c^SUCOAS_product_3; SUCOAS is "Succinyl-CoA synthetase (ADP-forming)";
    kf_SUCOAS = 1 per_mole_pow_2_per_second; kr_SUCOAS = 1 per_mole_pow_2_per_second;
  SUCD1: $fad_c + succ_c -> $fadh2_c + fum_c; kf_SUCD1*fad_c^SUCD1_reactant_1*succ_c^SUCD1_reactant_2 - kr_SUCD1*fadh2_c^SUCD1_product_1*fum_c^SUCD1_product_2; SUCD1 is "Succinate dehydrogenase";
    kf_SUCD1 = 1 per_mole_per_second; kr_SUCD1 = 1 per_mole_per_second;
  FUM: fum_c + $h2o_c -> mal__L_c; kf_FUM*fum_c^FUM_reactant_1*h2o_c^FUM_reactant_2 - kr_FUM*mal__L_c^FUM_product_1; FUM is "Fumarase";
    kf_FUM = 1 per_mole_per_second; kr_FUM = 1 per_second;
  MDH: mal__L_c + $nad_c -> $nadh_c + oaa_c + $h_c; kf_MDH*mal__L_c^MDH_reactant_1*nad_c^MDH_reactant_2 - kr_MDH*nadh_c^MDH_product_1*oaa_c^MDH_product_2*h_c^MDH_product_3; MDH is "Malate dehydrogenase";
    kf_MDH = 1 per_mole_per_second; kr_MDH = 1 per_mole_pow_2_per_second;
  MDH3: mal__L_c + mqn8_c => oaa_c + mql8_c; kf_MDH3*mal__L_c^MDH3_reactant_1*mqn8_c^MDH3_reactant_2; MDH3 is "Malate dehydrogenase (menaquinone 8 as acceptor)";
    kf_MDH3 = 1 per_mole_per_second;
  PPCK: oaa_c + $atp_c => pep_c + $adp_c + $co2_c; kf_PPCK*oaa_c^PPCK_reactant_1*atp_c^PPCK_reactant_2; PPCK is "Phosphoenolpyruvate carboxykinase";
    kf_PPCK = 1 per_mole_per_second;
  PC: $atp_c + hco3_c + pyr_c => $adp_c + $pi_c + oaa_c + $h_c; kf_PC*atp_c^PC_reactant_1*hco3_c^PC_reactant_2*pyr_c^PC_reactant_3; PC is "Pyruvate carboxylase";
    kf_PC = 1 per_mole_pow_2_per_second;
  ME1: mal__L_c + $nad_c => $nadh_c + $co2_c + pyr_c; kf_ME1*mal__L_c^ME1_reactant_1*nad_c^ME1_reactant_2; ME1 is "Malic enzyme (NAD)";
    kf_ME1 = 1 per_mole_per_second;
  POX2: 1.5 $o2_c + $h2o_c + $pi_c + $h_c + pyr_c => 2 h2o2_c + $co2_c + actp_c; kf_POX2*o2_c^POX2_reactant_1*h2o_c^POX2_reactant_2*pi_c^POX2_reactant_3*h_c^POX2_reactant_4*pyr_c^POX2_reactant_5; POX2 is "Pyruvate Oxidase (2)";
    kf_POX2 = 1 per_mole_pow_4dot5_per_second;
  ACKr: ac_c + $atp_c -> $adp_c + actp_c; kf_ACKr*ac_c^ACKr_reactant_1*atp_c^ACKr_reactant_2 - kr_ACKr*adp_c^ACKr_product_1*actp_c^ACKr_product_2; ACKr is "Acetate kinase";
    kf_ACKr = 1 per_mole_per_second; kr_ACKr = 1 per_mole_per_second;
  ACS: ac_c + $atp_c + $coa_c => $amp_c + $ppi_c + accoa_c; kf_ACS*ac_c^ACS_reactant_1*atp_c^ACS_reactant_2*coa_c^ACS_reactant_3; ACS is "Acetyl-CoA synthetase";
    kf_ACS = 1 per_mole_pow_2_per_second;
  PFL: pyr_c + $coa_c -> accoa_c + $for_c; kf_PFL*pyr_c^PFL_reactant_1*coa_c^PFL_reactant_2 - kr_PFL*accoa_c^PFL_product_1*for_c^PFL_product_2; PFL is "Pyruvate formate lyase";
    kf_PFL = 1 per_mole_per_second; kr_PFL = 1 per_mole_per_second;
  PTAr: accoa_c + $pi_c -> actp_c + $coa_c; kf_PTAr*accoa_c^PTAr_reactant_1*pi_c^PTAr_reactant_2 - kr_PTAr*actp_c^PTAr_product_1*coa_c^PTAr_product_2; PTAr is "Phosphotransacetylase";
    kf_PTAr = 1 per_mole_per_second; kr_PTAr = 1 per_mole_per_second;
  ALDD2x: $h2o_c + acald_c + $nad_c => $nadh_c + ac_c + 2 $h_c; kf_ALDD2x*h2o_c^ALDD2x_reactant_1*acald_c^ALDD2x_reactant_2*nad_c^ALDD2x_reactant_3; ALDD2x is "Aldehyde dehydrogenase (acetaldehyde, NAD)";
    kf_ALDD2x = 1 per_mole_pow_2_per_second;
  ACALD: acald_c + $coa_c + $nad_c => $nadh_c + accoa_c + $h_c; kf_ACALD*acald_c^ACALD_reactant_1*coa_c^ACALD_reactant_2*nad_c^ACALD_reactant_3; ACALD is "Acetaldehyde dehydrogenase (acetylating)";
    kf_ACALD = 1 per_mole_pow_2_per_second;
  LDH_D: lac__D_c + $nad_c -> $nadh_c + $h_c + pyr_c; kf_LDH_D*lac__D_c^LDH_D_reactant_1*nad_c^LDH_D_reactant_2 - kr_LDH_D*nadh_c^LDH_D_product_1*h_c^LDH_D_product_2*pyr_c^LDH_D_product_3; LDH_D is "D-lactate dehydrogenase";
    kf_LDH_D = 1 per_mole_per_second; kr_LDH_D = 1 per_mole_pow_2_per_second;
  UNK3: glu__L_c + _2kmb_c => akg_c + met__L_c; kf_UNK3*glu__L_c^UNK3_reactant_1*_2kmb_c^UNK3_reactant_2; UNK3 is "2-keto-4-methylthiobutyrate transamination";
    kf_UNK3 = 1 per_mole_per_second;
  ACOTA: acorn_c + akg_c -> glu__L_c + acg5sa_c; kf_ACOTA*acorn_c^ACOTA_reactant_1*akg_c^ACOTA_reactant_2 - kr_ACOTA*glu__L_c^ACOTA_product_1*acg5sa_c^ACOTA_product_2; ACOTA is "Acetylornithine transaminase";
    kf_ACOTA = 1 per_mole_per_second; kr_ACOTA = 1 per_mole_per_second;
  HCYSMT: amet_c + hcys__L_c => ahcys_c + met__L_c + $h_c; kf_HCYSMT*amet_c^HCYSMT_reactant_1*hcys__L_c^HCYSMT_reactant_2; HCYSMT is "Homocysteine S-methyltransferase";
    kf_HCYSMT = 1 per_mole_per_second;
  AMAOTr: _8aonn_c + amet_c -> amob_c + dann_c; kf_AMAOTr*_8aonn_c^AMAOTr_reactant_1*amet_c^AMAOTr_reactant_2 - kr_AMAOTr*amob_c^AMAOTr_product_1*dann_c^AMAOTr_product_2; AMAOTr is "Adenosylmethionine-8-amino-7-oxononanoate transaminase";
    kf_AMAOTr = 1 per_mole_per_second; kr_AMAOTr = 1 per_mole_per_second;
  UPP3MT: uppg3_c + 2 amet_c => 2 ahcys_c + dscl_c + $h_c; kf_UPP3MT*uppg3_c^UPP3MT_reactant_1*amet_c^UPP3MT_reactant_2; UPP3MT is "Uroporphyrinogen methyltransferase";
    kf_UPP3MT = 1 per_mole_pow_2_per_second;
  ASNS1: gln__L_c + asp__L_c + $h2o_c + $atp_c => $amp_c + $ppi_c + glu__L_c + $h_c + asn__L_c; kf_ASNS1*gln__L_c^ASNS1_reactant_1*asp__L_c^ASNS1_reactant_2*h2o_c^ASNS1_reactant_3*atp_c^ASNS1_reactant_4; ASNS1 is "Asparagine synthase (glutamine-hydrolysing)";
    kf_ASNS1 = 1 per_mole_pow_3_per_second;
  ADCS: chor_c + gln__L_c => _4adcho_c + glu__L_c; kf_ADCS*chor_c^ADCS_reactant_1*gln__L_c^ADCS_reactant_2; ADCS is "4-amino-4-deoxychorismate synthase";
    kf_ADCS = 1 per_mole_per_second;
  ADCYRS: adcobdam_c + 4 gln__L_c + 4 $h2o_c + 4 $atp_c => 4 $adp_c + adcobhex_c + 4 glu__L_c + 4 $pi_c + 4 $h_c; kf_ADCYRS*adcobdam_c^ADCYRS_reactant_1*gln__L_c^ADCYRS_reactant_2*h2o_c^ADCYRS_reactant_3*atp_c^ADCYRS_reactant_4; ADCYRS is "Adenosylcobyric acid synthase (glutamine-hydrolysing)";
    kf_ADCYRS = 1 per_mole_pow_12_per_second;
  P5CD: _1pyr5c_c + 2 $h2o_c + $nad_c => $nadh_c + glu__L_c + $h_c; kf_P5CD*_1pyr5c_c^P5CD_reactant_1*h2o_c^P5CD_reactant_2*nad_c^P5CD_reactant_3; P5CD is "1-pyrroline-5-carboxylate dehydrogenase";
    kf_P5CD = 1 per_mole_pow_3_per_second;
  CYSS: acser_c + h2s_c => cys__L_c + ac_c + $h_c; kf_CYSS*acser_c^CYSS_reactant_1*h2s_c^CYSS_reactant_2; CYSS is "Cysteine synthase";
    kf_CYSS = 1 per_mole_per_second;
  UPPDC1: uppg3_c + 4 $h_c => cpppg3_c + 4 $co2_c; kf_UPPDC1*uppg3_c^UPPDC1_reactant_1*h_c^UPPDC1_reactant_2; UPPDC1 is "Uroporphyrinogen decarboxylase (uroporphyrinogen III)";
    kf_UPPDC1 = 1 per_mole_pow_4_per_second;
  UPP3S: hmbil_c => uppg3_c + $h2o_c; kf_UPP3S*hmbil_c^UPP3S_reactant_1; UPP3S is "Uroporphyrinogen-III synthase";
    kf_UPP3S = 1 per_second;
  PROD2: $fad_c + pro__L_c => $fadh2_c + _1pyr5c_c + $h_c; kf_PROD2*fad_c^PROD2_reactant_1*pro__L_c^PROD2_reactant_2; PROD2 is "Proline dehydrogenase";
    kf_PROD2 = 1 per_mole_per_second;
  P5CR: $nadph_c + _1pyr5c_c + 2 $h_c => pro__L_c + nadp_c; kf_P5CR*nadph_c^P5CR_reactant_1*_1pyr5c_c^P5CR_reactant_2*h_c^P5CR_reactant_3; P5CR is "Pyrroline-5-carboxylate reductase";
    kf_P5CR = 1 per_mole_pow_3_per_second;
  IPPS: accoa_c + $h2o_c + _3mob_c => _3c3hmp_c + $h_c + $coa_c; kf_IPPS*accoa_c^IPPS_reactant_1*h2o_c^IPPS_reactant_2*_3mob_c^IPPS_reactant_3; IPPS is "2-isopropylmalate synthase";
    kf_IPPS = 1 per_mole_pow_2_per_second;
  ACCOAC: accoa_c + $atp_c + hco3_c => $adp_c + $pi_c + $h_c + malcoa_c; kf_ACCOAC*accoa_c^ACCOAC_reactant_1*atp_c^ACCOAC_reactant_2*hco3_c^ACCOAC_reactant_3; ACCOAC is "Acetyl-CoA carboxylase";
    kf_ACCOAC = 1 per_mole_pow_2_per_second;
  R_EX_cys__L_c: => cys__L_c; zkf_R_EX_cys__L_c;
    zkf_R_EX_cys__L_c = 1 per_second_times_mole;
  R_EX_acald_c: => acald_c; zkf_R_EX_acald_c;
    zkf_R_EX_acald_c = 1 per_second_times_mole;
  R_EX__3c3hmp_c: _3c3hmp_c => ; kf_R_EX__3c3hmp_c*_3c3hmp_c;
    kf_R_EX__3c3hmp_c = 1 per_second;
  R_EX_malcoa_c: malcoa_c => ; kf_R_EX_malcoa_c*malcoa_c;
    kf_R_EX_malcoa_c = 1 per_second;
  R_EX_lac__D_c: lac__D_c => ; kf_R_EX_lac__D_c*lac__D_c;
    kf_R_EX_lac__D_c = 1 per_second;
  R_EX_pep_c: pep_c => ; kf_R_EX_pep_c*pep_c;
    kf_R_EX_pep_c = 1 per_second;
  R_EX_pro__L_c: => pro__L_c; zkf_R_EX_pro__L_c;
    zkf_R_EX_pro__L_c = 1 per_second_times_mole;
  R_EX_gln__L_c: => gln__L_c; zkf_R_EX_gln__L_c;
    zkf_R_EX_gln__L_c = 1 per_second_times_mole;
  R_EX_chor_c: => chor_c; zkf_R_EX_chor_c;
    zkf_R_EX_chor_c = 1 per_second_times_mole;
  R_EX_hmbil_c: => hmbil_c; zkf_R_EX_hmbil_c;
    zkf_R_EX_hmbil_c = 1 per_second_times_mole;
  R_EX_cpppg3_c: cpppg3_c => ; kf_R_EX_cpppg3_c*cpppg3_c;
    kf_R_EX_cpppg3_c = 1 per_second;
  R_EX_dscl_c: dscl_c => ; kf_R_EX_dscl_c*dscl_c;
    kf_R_EX_dscl_c = 1 per_second;
  R_EX_amob_c: => amob_c; zkf_R_EX_amob_c;
    zkf_R_EX_amob_c = 1 per_second_times_mole;
  R_EX_met__L_c: met__L_c => ; kf_R_EX_met__L_c*met__L_c;
    kf_R_EX_met__L_c = 1 per_second;
  R_EX_hcys__L_c: => hcys__L_c; zkf_R_EX_hcys__L_c;
    zkf_R_EX_hcys__L_c = 1 per_second_times_mole;

  // Unit definitions:
  unit substance = mole; substance is "Predefined unit substance";
  unit time = second; time is "Predefined unit time";
  unit volume = litre; volume is "Predefined unit volume";
  unit per_mole_pow_3_per_second = 1 / (mole^3 * second); per_mole_pow_3_per_second is "per mole^3 per second";
  unit per_mole_pow_2_per_second = 1 / (mole^2 * second); per_mole_pow_2_per_second is "per mole^2 per second";
  unit per_mole_per_second = 1 / (mole * second);
  unit per_second = 1 / second;
  unit per_mole_pow_4dot5_per_second = 1 / (mole^4.5 * second); per_mole_pow_4dot5_per_second is "per mole^4.5 per second";
  unit per_mole_pow_4_per_second = 1 / (mole^4 * second); per_mole_pow_4_per_second is "per mole^4 per second";
  unit per_mole_pow_12_per_second = 1 / (mole^12 * second); per_mole_pow_12_per_second is "per mole^12 per second";
  unit per_second_times_mole = mole / second;
end
